// SBML level 3 version 1

model Pandey2018_reversible_transition_between_quiescence_and_proliferation()
  // Pandey2018-reversible transition between quiescence and proliferation
  // model units - substance: substance, time: time, volume: volume, area: area, length: length, extent: substance

  // Compartments:
  compartment compartment = 1 volume;

  // Species:
  species Myc in compartment = 0;
  species CycDT in compartment = 0;
  species CycET in compartment = 0.119;
  species CycAT in compartment = 0;
  species E2FT in compartment = 0.106;
  species Comp1 in compartment = 0.105;
  species Comp2 in compartment = 0;
  species Rbp in compartment = 0;
  species CkiT in compartment = 0.2;
  species CycECki in compartment = 0.115;
  species CycDCki in compartment = 0;
  species CycACki in compartment = 0;
  species Cdh1dp in compartment = 1;
  species Emi1T in compartment = 0.002;
  species EmiC in compartment = 0.002;
  species Cdh1 in compartment = 0.998;
  species UbI in compartment = 0.02;
  species $E2F in compartment;
  species $Rb in compartment;
  species Rbpp in compartment = 0.001;
  species $CycE in compartment;
  species $CycD in compartment;
  species $CycA in compartment;
  species $Cdh1p in compartment;
  species $Cdh1T in compartment = 1;

  // Parameters:
  S = 1;
  Ksm = 0.1;
  Kdm = 0.1;
  Kscycdm = 0.004;
  Kscycds = 0.004;
  Kdcycd = 0.008;
  Kscyceb = 0.0001;
  Kscycem = 0;
  Kscyce = 0.004;
  Kdcyce = 0.001;
  Kdcycea = 0.01;
  Khcyce = 0.25;
  Kscyca = 0.008;
  Kdcyca = 0.004;
  Kdcycac = 0.5;
  Khcyca = 0.1;
  Kse2fm = 0;
  Kse2f = 0.004;
  Kde2f = 0.003;
  Kde2fa = 0.01;
  Khe2f = 0.25;
  RbT = 1;
  Kase2f = 100;
  Kdise2f = 1;
  Kprb = 5;
  Kdprbp = 1;
  Kppeb = 0.5;
  Kdprbpp = 0.1;
  Kprbp = 2;
  JpRb = 0.01;
  JpRbp = 0.05;
  JdpRb = 0.05;
  JppRb = 0.5;
  Kscki = 0.04;
  Kdcki = 0.2;
  Kascki = 100;
  Kdiscki = 0.1;
  Ksub1 = 0.004;
  Kdub1 = 0.002;
  Kdub1c = 0.2;
  Ksemi1 = 0.45;
  Kdemi1 = 0.2;
  Kdemi1c = 2;
  Khemi1 = 0.1;
  Kascdh1 = 100;
  Kdiscdh1 = 0.1;
  Kacdh1 = 0.1;
  Kicdh1e = 0.14;
  Kicdh1a = 0.2;
  JdpCdh1 = 0.02;
  JpCdh1 = 0.25;
  Kse2fb = 0.0003;
  Kdckic = 1;

  // Assignment rules:
  Rb := RbT - Rbp - Rbpp - Comp1 - Comp2;
  CycA := CycAT - CycACki;
  CycE := CycET - CycECki;
  CycD := CycDT - CycDCki;
  Cdh1p := Cdh1T - Cdh1 - EmiC;
  E2F := E2FT - Comp1 - Comp2;

  // Reactions:
  reaction_for_Myc_production: => Myc; compartment*Ksm*S;
  reaction_for_Myc_decay: Myc => ; compartment*Kdm*Myc;
  reaction_for_CycDT_production: => CycDT; compartment*(Kscycdm*Myc + Kscycds*S);  // modifiers: Myc
  reaction_CycDT_decay: CycDT => ; compartment*Kdcycd*CycDT;
  reaction_for_CycET_production: => CycET; compartment*(Kscyceb + Kscycem*Myc + Kscyce*(E2F/(Khcyce + E2F)));  // modifiers: Myc, E2F
  reaction_CycET_decay: CycET => ; compartment*(Kdcyce + Kdcycea*CycA)*CycET;  // modifiers: CycA
  reaction_for_CycAT_production: => CycAT; compartment*Kscyca*(E2F/(Khcyca + E2F));  // modifiers: E2F
  reaction_CycAT_decay: CycAT => ; compartment*(Kdcyca + Kdcycac*Cdh1)*CycAT;  // modifiers: Cdh1
  reaction_for_E2FT_production: => E2FT; compartment*(Kse2fb + Kse2fm*Myc + Kse2f*(E2F/(Khe2f + E2F)));  // modifiers: Myc, E2F
  reaction_E2FT_decay: E2FT => ; compartment*(Kde2f + Kde2fa*CycA)*E2FT;  // modifiers: CycA
  reaction_Comp1_production: => Comp1; compartment*(Kase2f*E2F*Rb + Kdprbp*(Comp2/(JdpRb + Comp2)));  // modifiers: E2F, Rb, Comp2
  reaction_Comp1_decay: Comp1 => ; compartment*(Kdise2f*Comp1 + Kprb*CycD*(Comp1/(JpRb + Comp1)) + Kppeb*(CycE + CycA)*(Comp1/(JppRb + Comp1)) + (Kde2f + Kde2fa*CycA)*Comp1);  // modifiers: CycD, CycE, CycA
  reaction_for_Comp2_production: => Comp2; compartment*(Kase2f*E2F*Rbp + Kprb*CycD*(Comp1/(JpRb + Comp1)));  // modifiers: E2F, Rbp, CycD, Comp1
  reaction_Comp2_decay: Comp2 => ; compartment*(Kdise2f*Comp2 + Kdprbp*(Comp2/(JdpRb + Comp2)) + Kprbp*(CycE + CycA)*(Comp2/(JpRbp + Comp2)) + (Kde2f + Kde2fa*CycA)*Comp2);  // modifiers: CycE, CycA
  reactionfor_Rbp_production: => Rbp; compartment*(Kprb*CycD*(Rb/(JpRb + Rb)) + Kdise2f*Comp2 + (Kde2f + Kde2fa*CycA)*Comp2);  // modifiers: CycD, Rb, Comp2, CycA
  reaction_for_Rbp_decay: Rbp => ; compartment*(Kase2f*E2F*Rbp + Kdprbp*(Rbp/(JpRb + Rbp)) + Kprbp*(CycE + CycA)*(Rbp/(JpRbp + Rbp)));  // modifiers: E2F, CycE, CycA
  reaction_for_CkiT_production: => CkiT; compartment*Kscki;
  reaction_for_CkiT_decay: CkiT => ; compartment*(Kdcki + Kdckic*(CycE + CycA)*UbI)*CkiT;  // modifiers: CycE, CycA, UbI
  reaction_for_CycECki_production: => CycECki; compartment*Kascki*CycE*(CkiT - CycECki - CycDCki - CycACki);  // modifiers: CycE, CkiT, CycDCki, CycACki
  reaction_for_CycECki_decay: CycECki => ; compartment*(Kdiscki + Kdcyce + Kdcycea*CycA + Kdcki + Kdckic*(CycE + CycA)*UbI)*CycECki;  // modifiers: CycA, CycE, UbI
  reaction_for_CycDCki_production: => CycDCki; compartment*Kascki*CycD*(CkiT - CycECki - CycDCki - CycACki);  // modifiers: CycD, CkiT, CycECki, CycACki
  reaction_for_CycDCki_decay: CycDCki => ; compartment*(Kdiscki + Kdcycd + Kdcki + Kdckic*(CycE + CycA)*UbI)*CycDCki;  // modifiers: CycE, CycA, UbI
  reaction_for_CycACki_production: => CycACki; compartment*Kascki*CycA*(CkiT - CycECki - CycDCki - CycACki);  // modifiers: CycA, CkiT, CycECki, CycDCki
  reaction_for_CycACki_decay: CycACki => ; compartment*(Kdiscki + Kdcyca + Kdcycac*Cdh1 + Kdcki + Kdckic*(CycE + CycA)*UbI)*CycACki;  // modifiers: Cdh1, CycE, CycA, UbI
  reaction_for_Cdh1dp_production: => Cdh1dp; compartment*Kacdh1*((Cdh1T - Cdh1dp)/(JdpCdh1 + (Cdh1T - Cdh1dp)));  // modifiers: Cdh1T
  reaction_for_Cdh1dp_decay: Cdh1dp => ; compartment*(Kicdh1e*CycE + Kicdh1a*CycA)*(Cdh1dp/(JpCdh1 + Cdh1dp));  // modifiers: CycE, CycA
  reaction_for_Emi1T_production: => Emi1T; compartment*Ksemi1*(E2F/(Khemi1 + E2F));  // modifiers: E2F
  reaction_for_Emi1T_decay: Emi1T => ; compartment*(Kdemi1 + Kdemi1c*Cdh1)*Emi1T;  // modifiers: Cdh1
  reaction_for_EmiC_production: => EmiC; compartment*Kascdh1*(Cdh1T - EmiC)*(Emi1T - EmiC);  // modifiers: Cdh1T, Emi1T
  reaction_for_EmiC_decay: EmiC => ; compartment*(Kdiscdh1 + Kdemi1 + Kdemi1c*Cdh1)*EmiC;  // modifiers: Cdh1
  reaction_for_Cdh1_production: => Cdh1; compartment*(Kacdh1*((Cdh1T - EmiC - Cdh1)/(JdpCdh1 + (Cdh1T - Cdh1dp))) + (Kdiscdh1 + Kdemi1 + Kdemi1c*Cdh1)*(Cdh1dp - Cdh1));  // modifiers: Cdh1T, EmiC, Cdh1dp
  reaction_for_Cdh1_decay: Cdh1 => ; compartment*((Kicdh1e*CycE + Kicdh1a*CycA)*(Cdh1/(JpCdh1 + Cdh1dp)) + Kascdh1*Cdh1*(Emi1T - EmiC));  // modifiers: CycE, CycA, Cdh1dp, Emi1T, EmiC
  reaction_for_UbI_production: => UbI; compartment*Ksub1;
  reaction_for_UbI_decay: UbI => ; compartment*(Kdub1 + Kdub1c*Cdh1)*UbI;  // modifiers: Cdh1
  reaction_for_Rbpp_production: => Rbpp; compartment*(Kprbp*(CycE + CycA)*(Rbp/(JpRbp + Rbp)) + Kprbp*(CycE + CycA)*(Comp2/(JpRbp + Comp2)) + Kppeb*(CycE + CycA)*(Rb/(JppRb + Rb)) + Kppeb*(CycE + CycA)*(Comp1/(JppRb + Comp1)));  // modifiers: CycE, CycA, Rbp, Comp2, Rb, Comp1
  reaction_for_Rbpp_decay: Rbpp => ; compartment*Kdprbpp*(Rbpp/(JdpRb + Rbpp));

  // Unit definitions:
  unit length = metre;
  unit area = metre^2;
  unit volume = 1e-3 litre;
  unit time = second;
  unit substance = 1e-3 mole;
end
