// SBML level 3 version 1

model aggregate()

  // Compartments:
  compartment c = 1;
  compartment submod1__c = 1;

  // Species:
  species S in c = 1/c;
  species S1 in c = 1/c;
  species S2 in c = 1/c;
  species S3 in c = 1/c;
  species S4 in c = 1/c;
  species submod1__S in submod1__c = 1/submod1__c;
  species submod1__S1 in submod1__c = 1/submod1__c;
  species submod1__S2 in submod1__c = 1/submod1__c;
  species submod1__S3 in submod1__c = 1/submod1__c;
  species submod1__S4 in submod1__c = 1/submod1__c;

  // Reactions:
  R1: S1 => S2; R1_k*S1;
    R1_k = 0.1;
  R2: S2 => S4; R2_k*S2;
    R2_k = 0.1;
  submod1__R1: submod1__S1 => submod1__S2; submod1__R1_k*submod1__S1;
    submod1__R1_k = 0.1;
  submod1__R2: submod1__S2 => submod1__S4; submod1__R2_k*submod1__S2;
    submod1__R2_k = 0.1;
end
